// SBML level 2 version 4

function Constant_flux__irreversible(v)
  v;
end
Constant_flux__irreversible is "Constant flux (irreversible)";

model New_Model()

  // Compartments:
  compartment compartment = 1;

  // Species:
  species A in compartment = 0;
  species B in compartment = 0;

  // Parameters:
  k1 = 1;
  k2 = 1;
  k3 = 2;
  k4 = 1;

  // Reactions:
  A_syn: => A; compartment*Constant_flux__irreversible(k1);
  A_to_B: A => B; compartment*k2*A;
  B_to_A: B => A; compartment*k3*B;
  B_deg: B => ; compartment*k4*B;

  // Unit definitions:
  unit length = metre;
  unit area = metre^2;
  unit volume = litre;
  unit time = second;
  unit substance = mole;
end
