// SBML level 2 version 4

model main()

  // Compartments:
  compartment c1 = 1 litre;

  // Species:
  species FA_ul in c1 = 0;
  species GLY in c1 = 0;
  species G3P in c1 = 0;
  species LPA_ul in c1 = 0;
  species PA_ul_ul in c1 = 0;
  species DAG_ul_ul in c1 = 0;
  species TAG_ul_ul_ul in c1 = 0;
  species MAG_ul in c1 = 0;
  species Choline in c1 = 0;
  species ph_C in c1 = 0;
  species CDP_C in c1 = 0;
  species Ethanolamine in c1 = 0;
  species ph_EA in c1 = 0;
  species CDP_EA in c1 = 0;
  species Serine in c1 = 0;
  species PC_ul_ul in c1 = 0;
  species PE_ul_ul in c1 = 0;
  species PS_ul_ul in c1 = 0;
  species LPC_ul in c1 = 0;
  species G3PC in c1 = 0;
  species LPE_ul in c1 = 0;
  species G3PE in c1 = 0;

  // Parameters:
  k_glycerol_to_g3p = 0.009497724 per_second;
  k_g3p_to_lpa = 0.0185111 per_second;
  k_lpa_to_pa = 0.02846206 per_second;
  k_pa_to_dag = 0.03477178 per_second;
  k_dag_to_tag = 0.05882347 per_second;
  k_choline_ph = 0.04297679 per_second;
  k_choline_cdp = 0.05629722 per_second;
  k_ea_ph = 0.07001457 per_second;
  k_ea_cdp = 0.0969435 per_second;
  k_pe_syn = 0.1616263 per_second;
  k_pc_syn = 0.09748639 per_second;
  k_pc_to_ps = 0.09061222 per_second;
  k_pe_to_ps = 0.1349183 per_second;
  k_ps_to_pe = 0.130856 per_second;
  k_pe_to_pc = 0.1947112 per_second;
  k_pc_to_lpc = 0.1382518 per_second;
  k_lpc_to_g3pc = 0.1501258 per_second;
  k_g3pc_to_g3p = 0.1458362 per_second;
  k_pe_to_lpe = 0.1764945 per_second;
  k_lpe_to_g3pe = 0.1951793 per_second;
  k_g3pe_to_g3p = 0.1204942 per_second;
  k_dag_to_mag = 0.2182236 per_second;
  k_mag_to_dag = 0.345522 per_second;
  k_tag_to_dag = 0.2571684 per_second;
  k_mag_to_gly = 0.2735234 per_second;
  k_serine_syn = 0.2563172 per_second;
  k_gly_syn = 0.2887433 per_second;
  k_fa_influx = 0.2417361 per_second;
  k_serine_deg = 0.3526723 per_second;
  k_pc_trans = 0.308392 per_second;
  k_fa_deg = 0.2943802 per_second;
  k_gly_deg = 0.461167 per_second;
  k_choline_deph = 0.3396689 per_second;
  k_ea_deph = 0.2733778 per_second;
  k_gly_deph = 0.2992693 per_second;
  k_choline_syn = 0.3299699 per_second;
  k_choline_deg = 0.2731483 per_second;
  k_choline_cdp_back = 0.5103531 per_second;
  k_ea_cdp_back = 0.3672298 per_second;
  k_ea_deg = 0.453499 per_second;
  preeq_switch = 1.051539 per_second;
  k_fa_ul_influx has per_second;

  // Assignment rules:
  k_fa_ul_influx := (1 - preeq_switch)*k_fa_influx + piecewise(k_fa_influx, time >= 0, 0);

  // Reactions:
  GLY_to_G3P_0: GLY => G3P; k_glycerol_to_g3p*GLY;
  G3P_to_LPA_0: G3P + FA_ul => LPA_ul; k_g3p_to_lpa*G3P*FA_ul;
  LPA_to_PA_0: LPA_ul + FA_ul => PA_ul_ul; k_lpa_to_pa*LPA_ul*FA_ul;
  PA_to_DAG_0: PA_ul_ul => DAG_ul_ul; k_pa_to_dag*PA_ul_ul;
  DAG_to_TAG_0: DAG_ul_ul + FA_ul => TAG_ul_ul_ul; k_dag_to_tag*DAG_ul_ul*FA_ul;
  Choline_to_ph_C_0: Choline => ph_C; k_choline_ph*Choline;
  ph_C_to_CDP_C_0: ph_C => CDP_C; k_choline_cdp*ph_C;
  Ethanolamine_to_ph_EA_0: Ethanolamine => ph_EA; k_ea_ph*Ethanolamine;
  ph_EA_to_CDP_EA_0: ph_EA => CDP_EA; k_ea_cdp*ph_EA;
  DAG_to_PE_0: DAG_ul_ul + CDP_EA => PE_ul_ul; k_pe_syn*DAG_ul_ul*CDP_EA;
  DAG_to_PC_0: DAG_ul_ul + CDP_C => PC_ul_ul; k_pc_syn*DAG_ul_ul*CDP_C;
  PC_to_PS_0: PC_ul_ul + Serine => PS_ul_ul + Choline; k_pc_to_ps*PC_ul_ul*Serine;
  PE_to_PS_0: PE_ul_ul + Serine => PS_ul_ul + Ethanolamine; k_pe_to_ps*PE_ul_ul*Serine;
  PS_to_PE_0: PS_ul_ul => PE_ul_ul; k_ps_to_pe*PS_ul_ul;
  PE_to_PC_0: PE_ul_ul => PC_ul_ul; k_pe_to_pc*PE_ul_ul;
  PC_to_LPC_0: PC_ul_ul => LPC_ul + FA_ul; k_pc_to_lpc*PC_to_LPC_0_propensity*PC_ul_ul;
    PC_to_LPC_0_propensity = 1;
  LPC_to_G3PC_0: LPC_ul => G3PC + FA_ul; k_lpc_to_g3pc*LPC_to_G3PC_0_propensity*LPC_ul;
    LPC_to_G3PC_0_propensity = 1;
  G3PC_to_G3P_0: G3PC => G3P + Choline; k_g3pc_to_g3p*G3PC;
  PE_to_LPE_0: PE_ul_ul => LPE_ul + FA_ul; k_pe_to_lpe*PE_to_LPE_0_propensity*PE_ul_ul;
    PE_to_LPE_0_propensity = 1;
  LPE_to_G3PE_0: LPE_ul => G3PE + FA_ul; k_lpe_to_g3pe*LPE_to_G3PE_0_propensity*LPE_ul;
    LPE_to_G3PE_0_propensity = 1;
  G3PE_to_G3P_0: G3PE => G3P + Ethanolamine; k_g3pe_to_g3p*G3PE;
  DAG_to_MAG_0: DAG_ul_ul => MAG_ul + FA_ul; k_dag_to_mag*DAG_to_MAG_0_propensity*DAG_ul_ul;
    DAG_to_MAG_0_propensity = 1;
  MAG_to_DAG_0: MAG_ul + FA_ul => DAG_ul_ul; k_mag_to_dag*MAG_ul*FA_ul;
  TAG_to_DAG_0: TAG_ul_ul_ul => DAG_ul_ul + FA_ul; k_tag_to_dag*TAG_to_DAG_0_propensity*TAG_ul_ul_ul;
    TAG_to_DAG_0_propensity = 1;
  MAG_to_GLY_0: MAG_ul => GLY + FA_ul; k_mag_to_gly*MAG_to_GLY_0_propensity*MAG_ul;
    MAG_to_GLY_0_propensity = 1;
  Serine_synthesis: => Serine; k_serine_syn;
  Serine_degradation_0: Serine => ; k_serine_deg*Serine;
  GLY_synthesis: => GLY; k_gly_syn;
  GLY_degradation_0: GLY => ; k_gly_deg*GLY;
  FA_degradation_0: FA_ul => ; k_fa_deg*FA_ul;
  PC_degradation_0: PC_ul_ul => ; k_pc_trans*PC_ul_ul;
  ph_C_to_Choline_0: ph_C => Choline; k_choline_deph*ph_C;
  ph_EA_to_Ethanolamine_0: ph_EA => Ethanolamine; k_ea_deph*ph_EA;
  G3P_to_GLY_0: G3P => GLY; k_gly_deph*G3P;
  Choline_synthesis: => Choline; k_choline_syn;
  Choline_degradation_0: Choline => ; k_choline_deg*Choline;
  CDP_C_to_ph_C_0: CDP_C => ph_C; k_choline_cdp_back*CDP_C;
  CDP_EA_to_ph_EA_0: CDP_EA => ph_EA; k_ea_cdp_back*CDP_EA;
  Ethanolamine_degradation_0: Ethanolamine => ; k_ea_deg*Ethanolamine;
  FA_ul_synthesis: => FA_ul; k_fa_ul_influx;

  // Unit definitions:
  unit per_second = 1 / second;
end
